# oxDNA2 single-point energy/force evaluation; vars: data, tag
variable T    equal 0.1
variable rhos equal 0.5
units lj
dimension 3
newton on
boundary p p p
atom_style hybrid bond ellipsoid oxdna
atom_modify sort 0 1.0
neighbor 1.0 bin
neigh_modify every 1 delay 0 check yes
read_data ${data}
set atom * mass 3.1575
bond_style hybrid oxdna2/fene
bond_coeff * oxdna2/fene 2.0 0.25 0.7564
special_bonds lj 0 1 1
pair_style hybrid/overlay oxdna2/excv oxdna2/stk oxdna2/hbond oxdna2/xstk oxdna2/coaxstk oxdna2/dh
pair_coeff * * oxdna2/excv    2.0 0.7 0.675 2.0 0.515 0.5 2.0 0.33 0.32
pair_coeff * * oxdna2/stk     seqav ${T} 1.3523 2.6717 6.0 0.4 0.9 0.32 0.75 1.3 0 0.8 0.9 0 0.95 0.9 0 0.95 2.0 0.65 2.0 0.65
pair_coeff * * oxdna2/hbond   seqav 0.0 8.0 0.4 0.75 0.34 0.7 1.5 0 0.7 1.5 0 0.7 1.5 0 0.7 0.46 3.141592653589793 0.7 4.0 1.5707963267948966 0.45 4.0 1.5707963267948966 0.45
pair_coeff 1 4 oxdna2/hbond   seqav 1.0678 8.0 0.4 0.75 0.34 0.7 1.5 0 0.7 1.5 0 0.7 1.5 0 0.7 0.46 3.141592653589793 0.7 4.0 1.5707963267948966 0.45 4.0 1.5707963267948966 0.45
pair_coeff 2 3 oxdna2/hbond   seqav 1.0678 8.0 0.4 0.75 0.34 0.7 1.5 0 0.7 1.5 0 0.7 1.5 0 0.7 0.46 3.141592653589793 0.7 4.0 1.5707963267948966 0.45 4.0 1.5707963267948966 0.45
pair_coeff * * oxdna2/xstk    47.5 0.575 0.675 0.495 0.655 2.25 0.791592653589793 0.58 1.7 1.0 0.68 1.7 1.0 0.68 1.5 0 0.65 1.7 0.875 0.68 1.7 0.875 0.68
pair_coeff * * oxdna2/coaxstk 58.5 0.4 0.6 0.22 0.58 2.0 2.891592653589793 0.65 1.3 0 0.8 0.9 0 0.95 0.9 0 0.95 40.0 3.116592653589793
pair_coeff * * oxdna2/dh      ${T} ${rhos} 0.815 half_charged_ends yes
comm_modify cutoff 5.8
fix 1 all nve/asphere
timestep 1e-9
compute ebond all bond
compute eexcv all pair oxdna2/excv
compute estk  all pair oxdna2/stk
compute ehb   all pair oxdna2/hbond
compute exstk all pair oxdna2/xstk
compute ecx   all pair oxdna2/coaxstk
compute edh   all pair oxdna2/dh
compute epot  all pe
thermo_style custom step c_epot c_ebond[1] c_eexcv c_estk c_ehb c_exstk c_ecx c_edh
thermo_modify norm no
run 0
print "ENERGY $(atoms) $(c_ebond[1]:%.15g) $(c_eexcv:%.15g) $(c_estk:%.15g) $(c_ehb:%.15g) $(c_exstk:%.15g) $(c_ecx:%.15g) $(c_edh:%.15g) $(c_epot:%.15g)" file energy_${tag}.txt screen yes
