# Aspherical shear demo - 2d line box and triangle mixture, implicit solvent

units           lj
atom_style      line
dimension       2

read_data       data.line

velocity        all create 1.44 320984 loop geom

neighbor        0.3 bin
neigh_modify    delay 0 every 1 check yes
neigh_modify    exclude molecule/intra all

pair_style      line/lj 2.5
pair_coeff      * * 0.25 0.25 1.0 0.25 2.5

fix             2 all rigid molecule langevin 2.0 2.0 1.0 492983

fix             3 all deform 5 x scale 0.8 y scale 0.8
fix             4 all enforce2d

compute         10 all property/atom end1x end1y end2x end2y

#dump           1 all custom 500 dump1.atom id type x y z ix iy iz
#dump           2 all custom 500 dump1.line id type &
#               c_10[1] c_10[2] c_10[3] c_10[4]
#dump            viz all image 500 line-*.png type type line atom 0.4 box yes 0.015 &
#                    size 600 600 zoom 4.0 center s 0.5 0.5 0.5 &
#                    shiny 0.3 fsaa yes ssao yes 453983 0.3
#dump_modify     viz pad 6 color someorange 0.897993 0.646998 0.0390021 &
#                    acolor 1 someorange boxcolor steelblue lights 0.1 0.9 0.45 0.9

timestep        0.001

compute         1 all erotate/asphere
compute         2 all ke
compute         3 all pe
variable        toteng equal (c_1+c_2+c_3)/atoms

compute_modify  thermo_temp extra/dof -350

thermo          1000
thermo_style    custom step f_2 pe ke c_1 c_2 c_3 v_toteng
variable        nequil index 10000

run             ${nequil}

#undump          1
#undump          2
unfix           3

#undump           viz


change_box      all triclinic

#dump           1 all custom 500 dump2.atom id type x y z ix iy iz
#dump           2 all custom 500 dump2.line id type &
#               c_10[1] c_10[2] c_10[3] c_10[4]
#dump            viz all image 500 line-*.png type type line atom 0.4 box yes 0.015 &
#                    size 600 600 zoom 1.6 shiny 0.3 fsaa yes ssao yes 453983 0.3
#dump_modify     viz pad 6 color someorange 0.897993 0.646998 0.0390021 &
#                    acolor 1 someorange boxcolor steelblue lights 0.1 0.9 0.45 0.9

fix             3 all deform 1 xy erate 0.01 units box
variable        nprod index 10000

run             ${nprod}
