# Cement mixer drum

units           lj
atom_style      tri
atom_modify     map array
boundary        m m m
processors      * * 2
dimension       3
comm_modify     vel yes cutoff 14.0

# need a rather large box to accommodate the coordinates of the STL file
region          box block -500 0 -500 0 0 500 units box
create_box      2 box

# load remeshed version of STL file downloaded from Thingieverse
fix             20 all surface/local input stl 2 1 mixer-drum.stl

pair_style      hybrid granular surf/granular
pair_coeff      1 1 granular hooke 4000.0 100.0 &
                         tangential linear_history 1000.0 1.0 0.5 &
                         damping mass_velocity
pair_coeff      1 2 surf/granular hooke 10000.0 100.0 &
                         tangential linear_history 1000.0 1.0 0.5 &
                         damping mass_velocity
pair_coeff      2 2 none

group           sphere type 1
group           tri type 2
variable        tris equal count(tri)

neighbor        0.3 bin
neigh_modify    delay 0 every 1 check yes

timestep        0.002
fix             2 sphere nve/sphere
fix             3 sphere gravity 1.0 vector 0 0 -1

variable comx equal xcm(tri,x)
variable comy equal xcm(tri,y)
variable comz equal xcm(tri,z)

run 0 post no

# move mixer drum to origin
displace_atoms all move $(-1.0*v_comx) $(-1.0*v_comy) $(-1.0*v_comz)
run 0 post no

# rotate it around x axis
displace_atoms all rotate 0.0 0.0 0.0 1.0 0.0 0.0 -60.0

# re-adjust the box for the rotated drum and switch to fixed boundaries so we can lose atoms
# NOTE: the box needs to be large enough so we won't lose tris from the surface
change_box all x final -250 250 y final -250 250 z final -250 250
change_box all boundary f f f

# insert polydisperse particles in batches inside the drum
region slab block -60 60 -105 75 -60 50
variable pour index 75000
fix     ins sphere pour ${pour} 1 4767548 vol 0.6 10 vel 0 0 0 0 -2.0 &
            dens 2.5 2.5 diam range 0.2 5.0 region slab ignore id next

compute         2 sphere temp/sphere
compute_modify  2 dynamic/dof yes

# use a dynamic group to cut away part of the drum so we can look inside
variable dumpfreq index 250
variable select atom "(type==2 && x>-60) || (type==1)"
group viz dynamic all var select every ${dumpfreq}

variable added equal atoms-v_tris

thermo          1000
thermo_style    custom step atoms v_tris v_added temp press ke
thermo_modify   lost warn temp 2

# performance optimization: exclude non-interacting pairs and add load-balancing
neigh_modify    exclude group tri tri
fix             bal all  balance 1000 1.0 shift xyz 5 1.1 weight group 2 sphere 5.0 tri 1.0 weight time 0.5

# visualize granular particles and tris triangles as flat triangles.

dump            viz viz image ${dumpfreq} mixer-drum-*.png id diameter &
                    tri type 1 0.2 size 800 600 zoom 2.5 shiny 0.3 &
                    fsaa yes view 70 -160 box no 0.025 ssao yes 2315423 0.1
dump_modify     viz pad 6 backcolor black backcolor2 white boxcolor steelblue &
                    acolor 1 slategray acolor 2 slategray atrans 2 1.0 &
                    lights 0.1 0.8 0.45 0.9

# to color only the granular particles by atom id with the colormap
# we have to skip over the triangles when setting the map range.
dump_modify     viz amap ${tris} $(v_tris+v_pour) &
                    cf 0.0 9 min orange 0.125 white 0.25 yellow 0.375 &
                    green 0.5 cyan 0.625 blue 0.75 purple 0.875 red max magenta
variable        nequil index 50000

# fill the drum with 50000 granular particles which takes around 25000 steps
run             ${nequil}
unfix ins

# trigger rotation central axis of drum.
# since we centered the drum on the origin this is rather simple math
fix             1 tri move rotate 0 0 0 0 -0.87 -0.5 250.0
variable        nprod index 450000

run             ${nprod}
