units           real
dimension       3
boundary        p p p
atom_style      full

timestep        0.5

bond_style harmonic
angle_style harmonic
dihedral_style harmonic
improper_style none

region my_box block 0 40 0 40 0 40
create_box 4 my_box bond/types 1 angle/types 1 dihedral/types 1 extra/bond/per/atom 12 extra/angle/per/atom 12 extra/dihedral/per/atom 8 extra/special/per/atom 30

mass  * 59.0448

# Use pair_style hybrid to incorporate the LDD interactions with other forces
pair_style hybrid/overlay ldd table spline 3000

molecule CHAIN ABCD.mol
create_atoms 0 random 60 885401 my_box mol CHAIN 454756

include ff_bonded_params.lammps

velocity        all create 300.0 22345 dist gaussian loop geom

pair_coeff      * * table nb_interaction_tables/lammps_nb_ACA_ACA.table nb_ACA_ACA 15.0

# map atom types 1-4 to local-density species A,B,C,D (defined in the file)
pair_coeff      * * ldd ABCD_mol.ldd A B C D
# In this example, for simplicity, we set interactions by central site, so every
# ordered species pair X Y reuses the X-centered table.  Up to 4x4 distinct
# settings are possible (one line per ordered species pair).

thermo 1000

fix 0 all box/relax aniso 100.0
variable        maxiter index 10000
variable        maxeval index 100000

minimize 1.0e-10 1.0e-10 ${maxiter} ${maxeval}

# write_data data.ldd_molecule nocoeff
