# pouring spheres into box made of triangles

units           lj
atom_style      tri
atom_modify     map array
boundary        f f f
dimension       3
comm_modify     vel yes cutoff 12.5

region          box block -10 10 -10 10 -10 10 units box
create_box      2 box

fix             20 all surface/local input stl 2 1 surf.tribox.stl

pair_style      hybrid granular surf/granular
pair_coeff      1 1 granular hooke 4000.0 100.0 &
                         tangential linear_history 1000.0 1.0 0.5 &
                         damping mass_velocity
pair_coeff      1 2 surf/granular hooke 4000.0 100.0 &
                         tangential linear_history 1000.0 1.0 0.5 &
                         damping mass_velocity
pair_coeff      2 2 none

group           sphere type 1
group           tri type 2

neighbor        0.3 bin
neigh_modify    delay 0 every 1 check yes

fix             2 sphere nve/sphere
fix             3 sphere gravity 1.0 vector 0 0 -1

region          slab block -2 2 -2 2 -2 2 units box
fix             ins sphere pour 100 1 4767548 vol 0.4 10 &
                diam range 0.5 2.0 region slab ignore

timestep        0.005

compute         1 sphere temp
compute_modify  1 dynamic/dof yes

compute         2 sphere temp/sphere
compute_modify  2 dynamic/dof yes

thermo          100
thermo_style    custom step atoms temp c_1 c_2 press
thermo_modify   lost ignore
compute_modify  thermo_temp dynamic/dof yes
variable        nsteps1 index 5000

#dump            viz all image 100 tribox.surf-*.ppm type diameter &
#                    tri atom 1 0.2 size 800 800 zoom 1.6 shiny 0.3 &
#                    fsaa yes view 80 10 box yes 0.025 region slab blue frame 0.15
#dump_modify     viz pad 6 backcolor black backcolor2 white boxcolor gray &
#                    acolor 1 slategray acolor 2 forestgreen atrans 2 0.25 &
#                    lights 0.15 0.9 0.45 0.9

run             ${nsteps1}

fix             1 tri move rotate 0 0 0 0 0 1 25
variable        nsteps2 index 5000

run             ${nsteps2}

unfix           1
set             group tri angmom 0.0 0.0 0.0
velocity        tri set 0.0 0.0 0.0
variable        nsteps3 index 5000

run             ${nsteps3}

fix             1 tri move rotate 0 0 0 1 1 1 25
variable        nsteps4 index 5000

run             ${nsteps4}

unfix           1
set             group tri angmom 0.0 0.0 0.0
velocity        tri set 0.0 0.0 0.0
variable        nsteps5 index 5000

run             ${nsteps5}
