# GCMC for a LJ fluid confined to a spherical region inside the box.
#
# This input showcases the "region" keyword of fix gcmc: insertions,
# deletions, and Monte Carlo translation moves are all restricted to the
# named region (here a sphere in the center of the box).  For a
# non-rectangular region, trial positions are drawn from the region's
# rectangular bounding box and rejected until one falls inside the region.
#
# A translation move is also rejected if the displaced atom cannot be
# placed back inside the region within 1000 trials.  With the reasonable
# "disp" below this essentially never happens.  To see the
#   "Fix gcmc could not place a region-restricted trial move ..."
# warning fire reliably, comment out the first fix command below and
# uncomment the second one, increase the value of variable `disp`.
# Don't make it too big or you will get a `lost atom` error.
# Because that warning is emitted only once per MPI rank, run on several
# ranks to see it multiple times, not necessarily all on the same
# timestep e.g.:

#   mpirun -np 4 lmp -in in.gcmc.region -var disp 25.0

# variables modifiable using the -var command line switch

variable        mu    index -1.25
variable        temp  index 2.0
variable        disp  index 1.0   # reasonable value
#variable        disp  index 25.0 # unreasonable value
variable        rad  index 2.5    # rather small radius of sphere region
variable        lbox  index 20.0

# global model settings

units           lj
atom_style      atomic
pair_style      lj/cut 3.0
pair_modify     tail no            # turn off to avoid triggering full_energy

# box

region          box block 0 ${lbox} 0 ${lbox} 0 ${lbox}
create_box      1 box

# spherical sub-region that confines all GCMC exchanges and moves

region          sphere sphere $(0.5*v_lbox) $(0.5*v_lbox) $(0.5*v_lbox) ${rad}

# lj parameters

pair_coeff      * * 1.0 1.0
mass            * 1.0

# dedicated group for the GCMC atoms

group           gcmcgroup type 1

# region-restricted GCMC with reasonable settings

fix             mygcmc gcmcgroup gcmc 1 100 100 1 29494 ${temp} ${mu} ${disp} region sphere

# atom count inside the region

variable        ninreg equal count(gcmcgroup,sphere)

# acceptance statistics

variable        nugget equal 1.0e-8
variable        tacc equal f_mygcmc[2]/(f_mygcmc[1]+${nugget})
variable        iacc equal f_mygcmc[4]/(f_mygcmc[3]+${nugget})
variable        dacc equal f_mygcmc[6]/(f_mygcmc[5]+${nugget})

compute_modify  thermo_temp dynamic/dof yes
thermo_style    custom step atoms v_ninreg v_iacc v_dacc v_tacc press
thermo          100
variable        nsteps index 5000

# run

run             ${nsteps}
