# vapor-liquid coexistence of CO2 (TraPPE model: rigid molecules with
# partial charges, long-range electrostatics) with Gibbs ensemble Monte Carlo
#
# requires two partitions, one for each box, e.g.:
#   mpirun -np 2 lmp -in in.gemc.co2 -partition 1 1
#   mpirun -np 4 lmp -in in.gemc.co2 -partition 1 3
#
# NIST saturated densities at 250 K: vapor 0.0466, liquid 1.046 g/cm^3
# molecules stay rigid, since all MC moves are rigid-body moves

variable        T index 250.0                # temperature (K)
variable        neq index 200                # equilibration cycles with step size tuning
variable        nprod index 1000             # production cycles
variable        rho world 0.05 1.0           # initial densities (g/cm^3)
variable        N world 40 216               # initial numbers of molecules
variable        L equal (v_N*44.0095/(0.60221408*v_rho))^(1.0/3.0)

units           real
atom_style      full
region          box block 0 ${L} 0 ${L} 0 ${L}
create_box      2 box bond/types 1 angle/types 1 extra/bond/per/atom 2 &
                extra/angle/per/atom 1 extra/special/per/atom 2
molecule        co2mol CO2.txt
create_atoms    0 random ${N} 7771 NULL mol co2mol 464563 overlap 3.0 maxtry 1000

pair_style      lj/cut/coul/long 12.0
pair_modify     mix arithmetic tail yes
kspace_style    pppm 1.0e-5
pair_coeff      1 1 0.053649 2.80
pair_coeff      2 2 0.156973 3.05
bond_style      harmonic
bond_coeff      1 0.0 1.16
angle_style     harmonic
angle_coeff     1 0.0 180.0
mass            1 12.0107
mass            2 15.9994
neighbor        1.0 bin
neigh_modify    every 1 delay 0 check yes

# equilibration: every step attempt on average 50 molecule translations
# or rotations, 100 molecule exchanges, and 2 volume exchanges, and adjust
# the maximum displacement, rotation angle, and volume change

#   args:        N  M  X   V  T    displace maxdlogvolratio seed
fix             mc all gemc 1  50 100 2  ${T} 0.5      0.1             7771 &
                mol co2mol maxangle 30 tune 20 0.4 0.4
compute_modify  thermo_temp dynamic/dof yes

variable        nmol equal atoms/3
thermo_style    custom step v_nmol vol pe density f_mc[1] f_mc[2] f_mc[3] &
                f_mc[4] f_mc[5] f_mc[6] f_mc[7] f_mc[8] f_mc[11]
thermo_modify   norm no
thermo          50
run             ${neq}

# production with the adjusted step sizes

variable        disp equal $(f_mc[7])
variable        dlv equal $(f_mc[8])
variable        angle equal $(f_mc[11])
unfix           mc
fix             mc all gemc 1 50 100 2 ${T} ${disp} ${dlv} 7772 mol co2mol maxangle ${angle}
run             ${nprod}
