include         common.mod
pair_style      lj/cut 2.5
pair_coeff      1 1 1.0 1.0 2.5
fix             1 all nve
fix             g all gravity 1.0 vector 0 0 -1 disable
thermo_style    custom step temp epair etotal press
thermo          100
run             100
