include         common.mod
pair_style      lj/cut 2.5
pair_coeff      1 1 1.0 1.0 2.5
compute         hex all hexorder/atom nnn NULL cutoff 1.4
compute         hxa all reduce ave c_hex[1]
compute         hxb all reduce ave c_hex[2]
fix             1 all nve
thermo_style    custom step temp c_hxa c_hxb
thermo          25
run             25
