include         common.mod
pair_style      morse 2.5
pair_coeff      1 1 1.0 2.0 1.5 2.5
pair_modify     shift yes
fix             1 all nve
thermo_style    custom step temp epair etotal press
thermo          100
run             100
