units lj
atom_style atomic
boundary p p p
processors * * *
read_data data.arith
pair_style lj/cut/dispplanar 4.0 0.6
pair_coeff 1 1 1.0 1.0
pair_coeff 2 2 1.5 1.1
pair_modify mix arithmetic
kspace_style pppm/disp/planar 1.0e-5
kspace_modify corr bin
variable dz equal 0.06
compute pfull all stress/cartesian z ${dz} NULL 0 kspace
fix f1 all ave/time 1 1 1 c_pfull[*] file arith_pppmkk_ks.dat mode vector
thermo 1
run 0
